b := 10
a := 4
f(x) :=
    -b*|x|/a + b if |x| < a
    0 if |x| > a
d^2/dt^2(u(x, t)) == d^2/dx^2(u(x, t))
j(s) := 0
u(x, t) := 1/2*f(x - t) + 1/2*f(x + t) + integral(1/2*j(s), s = x - t .. x + t)
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